# 假设炮台位置是坐标原点，则需要根据三个点（0,0），（x1,y1）（x2,y2）求一个抛物线——y=ax^2+bx+c 。因为抛物线过坐标原点，则c=0。将另外两点带入抛物线方程，则
y_1 := a*x_1^2 + b*x_1
b := (y_1 - a*x_1^2)/x_1
y_2 := a*x_2^2 + b*x_2
y_2 := a*x_2^2 + (y_1 - a*x_1^2)/x_1*x_2
y_2 := a*x_2^2 + y_1*x_2/x_1 - a*x_1*x_2
a := (y_2 - y_1*x_2/x_1)/(x_2^2 - x_1*x_2)
CameraHight := 0.685
TargetHight := 2.67
Distance := 5
parabolaTopXE := 0.2
parabolaTopYE := 0.1
x_1 := Distance
y_1 := TargetHight - CameraHight
x_2 := Distance - parabolaTopXE
y_2 := y_1 + parabolaTopYE
parabola_a := (y_1*x_2/x_1 - y_2)/(x_1*x_2 - x_2^2)
parabola_b := (y_1 - x_1^2*parabola_a)/x_1
vertex_x := -parabola_b/(2*parabola_a)
vertex_y := -parabola_b^2/(4*parabola_a)
V_y = V*sin(θ)
V_x = V*cos(θ)
H := 1/2*gt^2
H := 1/2*V_y*t
X := V_x*t
V_y := 2*H/t
V_x := X/t
sin(θ)/cos(θ) = (V_y/V_x)
tan(θ) := 2*H/X
